*Heading
** Job name: LatticeJob Model name: LatticeModel
** Generated by: Abaqus/CAE Learning Edition 2025
*Preprint, echo=NO, model=NO, history=NO, contact=NO
**
** PARTS
**
*Part, name=Part-1
*End Part
**
**
** ASSEMBLY
**
*Assembly, name=Assembly
**
*Instance, name=Part-1-1, part=Part-1
*Node
      1, -0.00499999989,   9.99499989
      2, -0.00249999994,          10.
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*Element, type=B21
1, 1, 2
2, 2, 3
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*Nset, nset=AllEdges, generate
   1,  116,    1
*Elset, elset=AllEdges, generate
   1,  168,    1
** Section: BeamSection  Profile: BeamProfile
*Beam Section, elset=AllEdges, material=Steel, temperature=GRADIENTS, section=CIRC
0.001
0.,0.,-1.
*End Instance
**
*Nset, nset=LoadNodes, instance=Part-1-1
  11,  12,  23,  34,  35,  37,  47,  48,  60,  61,  74,  75,  88,  89, 102, 103
*Nset, nset=SupportNodes, instance=Part-1-1
  14,  24,  28,  29,  41,  42,  55,  56,  69,  70,  83,  84,  97,  98, 111, 112
*End Assembly
**
** MATERIALS
**
*Material, name=Steel
*Elastic
 2e+11, 0.3
** ----------------------------------------------------------------
**
** STEP: Step-1
**
*Step, name=Step-1, nlgeom=NO
*Static
1., 1., 1e-05, 1.
**
** BOUNDARY CONDITIONS
**
** Name: FixedSupport Type: Displacement/Rotation
*Boundary
SupportNodes, 1, 1
SupportNodes, 2, 2
SupportNodes, 6, 6
**
** LOADS
**
** Name: VerticalLoad   Type: Concentrated force
*Cload
LoadNodes, 2, -3200.
**
** OUTPUT REQUESTS
**
*Restart, write, frequency=0
**
** FIELD OUTPUT: F-Output-1
**
*Output, field, variable=PRESELECT
**
** HISTORY OUTPUT: H-Output-1
**
*Output, history, variable=PRESELECT
*End Step
